// SBML level 2 version 4
// dcterms:bibliographicCitation: e-ISSN urn:miriam:unknown:2278-5728
// dcterms:bibliographicCitation: e-ISSN urn:miriam:unknown:2600-8238

function Constant_flux__irreversible(v)
  v;
end
Constant_flux__irreversible is "Constant flux (irreversible)";

function Contagion(k1, S, I)
  k1*S*I;
end

model Typhoid()
  // Model source:
  // Peter, O. J., Ibrahim, M. O., Akinduko, O. B., and Rabiu, M. (2017). Mathematical model for the control of typhoid fever. IOSR Journal of Mathematics (IOSR-JM). e-ISSN, 2278-5728.
  // Parameter estimates source:
  // Peter, O. J., Akinduko, Oluwaseun B., C. Y. Ishola, O. A. Afolabi, and A. B. Ganiyu. "Series Solution Of Typhoid Fever Model Using Differential Transform Method." Malaysian Journal of Computing 3, no. 1 (2018): 67-80.
  // Parameter estimation described for each parameter in Global Quantities.
  // Assumption: 'I' (Infectious individuals) in the coded model is equivalent to 'I_e' (educated infectious individuals) in Peter et. al. (2018)
  // Figures 2, 3, 5, 6 and 7 in Peter et. al. (2018) replicated for k = 0 with some differences that may originate due to the model differences (no division of infectious class and individuals in treatment not infectious in the coded model)
  // isDescribedBy unknown:2600-8238
  // isDescribedBy unknown:2278-5728

  // Compartments:
  compartment Humans = 1;  // 0-D

  // Species:
  // Protected (Vaccinated) individuals
  species P in Humans = 100;
  // Susceptible individuals
  species S in Humans = 200;
  // Infectious individuals
  species I in Humans = 120;
  // Individuals in treatment
  species T in Humans = 80;
  // Recovered individuals
  species R in Humans = 60;

  // Parameters:
  // Vaccination rate (that is, proportion of protected individuals recruited)
  // Estimate reference: tau/Lambda in Peter et. al. (2018)
  // Use slider to vary this parameter value.
  sigma = 0.092;
  // Total rate of recruitment of individuals into the system
  // Estimate reference: Lambda in Peter et. al. (2018)
  Lambda = 200;
  // Rate of waning immunity of protected individuals
  // Estimate reference: omega in Peter et. al. (2018)
  gamma = 0.5;
  // Natural mortality rate
  // Estimate reference: mu in Peter et. al. (2018)
  mu = 0.142;
  // Infection transmission coefficient
  // Estimate reference: beta_2 in Peter et. al. (2018)
  alpha = 0.05;
  // Treatment initiation rate
  // Estimate reference: phi_2 in Peter et. al. (2018)
  beta = 0.3;
  // Recovery rate.
  // Estimate reference: epsilon in Peter et. al. (2018)
  epsilon = 0.4;
  // Disease induced mortality rate
  // Estimate reference: delta in Peter et. al. (2018)
  delta = 0.075;
  // Immunity waning rate of recovered individuals' temporary immunity
  // Assumed. Use sliders in Time Course to vary.
  // k = 0 to replicate results in Peter et. al. (2018)
  k = 0;
  Initial_for_Lambda = Lambda;
  Initial_for_sigma = sigma;

  // Assignment rules:
  Lambda_S := Initial_for_Lambda*(1 - Initial_for_sigma);
  Lambda_P := Initial_for_Lambda*Initial_for_sigma;

  // Reactions:
  // Recruitment of individuals in the protected class (immunized)
  Birth__Vaccinated: => P; Humans*Constant_flux__irreversible(Lambda_P); Birth__Vaccinated is "Birth- Vaccinated";
  // Recruitment of individuals in the susceptibe class (not immunized)
  Birth__Susceptible: => S; Humans*Constant_flux__irreversible(Lambda_S); Birth__Susceptible is "Birth- Susceptible";
  // Waning immunity in protected (vaccinated) individuals
  Waning_immunity___Vaccination: P => S; Humans*gamma*P; Waning_immunity___Vaccination is "Waning immunity - Vaccination";
  // Natural mortality of protected individuals
  Death_P: P => ; Humans*mu*P;
  // Natural mortality of susceptible individuals
  Death_S: S => ; Humans*mu*S;
  // Infection transmission to a susceptible individual upon contact with infectious individual
  Infection: S => I; Humans*Contagion(alpha, S, I);
  // Disease induced death (due to lack of treatment)
  Disease_induced_death: I => ; Humans*delta*I;
  // Infectious individuals starting treatment
  Treatment_initiation: I => T; Humans*beta*I;
  // Natural mortality of infectious individuals
  Death_I: I => ; Humans*mu*I;
  // Recovery of individuals upon treatment
  Recovery: T => R; Humans*epsilon*T;
  // Natural mortality of individuals in treatment
  Death_T: T => ; Humans*mu*T;
  // Natural mortality of recovered individuals
  Death_R: R => ; Humans*mu*R;
  // Waning of the temporary immunity of recovered individuals
  Waning_Immunity__Post_infection: R => S; Humans*k*R; Waning_Immunity__Post_infection is "Waning Immunity- Post infection";

  // Unit definitions:
  unit length = metre;
  unit area = metre^2;
  unit volume = litre;
  unit time = second;
  unit substance = item;
end
